// SBML level 2 version 4

function Constant_flux__irreversible_0(v)
  v;
end
Constant_flux__irreversible_0 is "Constant flux (irreversible)";

model New_Model_1()

  // Compartments:
  compartment Cell = 1;

  // Species:
  species Oxy in Cell = 100;
  species migration_speed in Cell = 0;
  species transition_rate_0_1 in Cell = 0;
  species death_rate in Cell = 0;
  species secretion_rate_Lactate in Cell = 1;

  // Parameters:
  Alpha = 2;

  // Reactions:
  Aerobic_Reaction: Oxy => ; Cell*Alpha*Oxy;
  reaction: => transition_rate_0_1; Cell*Constant_flux__irreversible_0(reaction_v); reaction is "reaction1";
    reaction_v = 0.01;
  reaction2: => migration_speed; Cell*Constant_flux__irreversible_0(reaction2_v);  // modifiers: Oxy
    reaction2_v = 100;
  reaction_0: => secretion_rate_Lactate; Cell*Constant_flux__irreversible_0(reaction_0_v);
    reaction_0_v = 15;

  // Events:
  event: at (Oxy < 50): death_rate = 100;

  // Unit definitions:
  unit volume = 1e-3 litre;
  unit time = 60 second;
  unit substance = 1e-3 mole;
end
